// COMSOL Multiphysics 4.3.2.189 model "smf-28.mph"
// Outline of the model tree

Parameters
  CORE_RADIUS = 4.1 [um]
  CLADDING_RADIUS = 62.5 [um]
  EXTERIOR_RADIUS = CLADDING_RADIUS + 20 [um]
  N_CORE = 1.448701601
  N_CLADDING = 1.444023625
  N_EXTERIOR = 1.327292175
  FREE_SPACE_WAVELENGTH = 1.55 [um]
  FREQUENCY = c_const/FREE_SPACE_WAVELENGTH

Selections
  sel1: Explicit on domains 1-3
  sel2: Explicit on domains 1-3
  sel3: Explicit on domains 1-3

Coordinate systems
  sys2: Boundary "Boundary System" | identifier = sys

Geometry
  geom2 "SMF-28 (Water) Geometry" (2D, length unit µm)
    c1: Circle "Core" | pos = {0, 0}; r = CORE_RADIUS
    c2: Circle "Cladding" | pos = {0, 0}; r = CLADDING_RADIUS
    c3: Circle "Exterior" | r = EXTERIOR_RADIUS
    fin: Finalize "Form Union"

Materials
  mat4 "Core (Doped Silica Glass)" on domains 3
    RefractiveIndex
      n = N_CORE
      ki = 0
  mat5 "Cladding (Silica Glass)" on domains 2
    RefractiveIndex
      n = N_CLADDING
      ki = 0
  mat6 "Exterior (Water)" on domains 1
    RefractiveIndex
      n = N_EXTERIOR
      ki = 0

Physics
  ewfd2: ElectromagneticWavesFrequencyDomain on all domains
    dependent variable E2 = {E2x, E2y, E2z}
    wee1: WaveEquationElectric (default)
      coeffB = {0.7028554, 0.4146307, 0.897454}
      coeffC = {0.0727723 [um], 0.1143085 [um], 9.896161 [um]}
      materialType = from_mat
    pec1: PerfectElectricConductor (default)
    init1: init "Initial Values 1" (default)
    wee2: WaveEquationElectric "Sellmeier Core" on domains 3
      DisplacementFieldModel = SellmeierDispersionModel
      coeffB = {0.7028554, 0.4146307, 0.897454}
      coeffC = {(0.0727723 [um])^2, (0.1143085 [um])^2, (9.896161 [um])^2}
      materialType = from_mat
    wee3: WaveEquationElectric "Sellmeier Exterior" on domains 1
      DisplacementFieldModel = SellmeierDispersionModel
      coeffB = {0.5689094, 0.1719709, 0.02062502}
      coeffC = {(0.005110302 [um])^2, (0.05110302 [um])^2, (0.02624159 [um])^2}
    wee4: WaveEquationElectric "Sellmeier Cladding" on domains 2
      DisplacementFieldModel = SellmeierDispersionModel
      coeffB = {0.6961663, 0.4079426, 0.8974790}
      coeffC = {(0.06840430 [um])^2, (0.1162414 [um])^2, (9.896161 [um])^2}

Mesh
  mesh2 "Mesh"
    size: MeshSizeDefault | hauto = 5; custom = on
    ftri1: FreeTri "Free Triangular 1" on remaining entities
      size1: Size "Core Mesh" on domains 3 | hauto = 3
      size2: Size "Cladding Mesh" on domains 2 | hauto = 4
      size3: Size "Exterior Mesh" on domains 1 | hauto = 7

Studies
  std1 "Study 1"
    mode: ModeAnalysis | neigs = 6; shift = 1; modeFreq = 1[kHz]

Solver configurations
  sol1 "Solver 1" (study std1)
    v1: Variables "Dependent Variables 1"
    e1: Eigenvalue "Eigenvalue Solver 1"
      dDef: Direct

Datasets
  dset1: Solution | solution = sol1